SetBusXY p5rdt149-p5rhs0_1247x -120.91292875147646 36.60102672210813
SetkVBase p5rdt149-p5rhs0_1247x kVLN=7.199557856794634
SetBusXY p5rdt149-p5rhs0_1247x_b1_1 -120.91984825250762 36.59776619575616
SetkVBase p5rdt149-p5rhs0_1247x_b1_1 kVLN=7.199557856794634
SetBusXY p5rdt149lv -120.96155778160369 36.56885399412164
SetkVBase p5rdt149lv kVLN=0.27712812921102037
SetBusXY p5rlv265 -120.96150686468123 36.56884369179864
SetkVBase p5rlv265 kVLN=0.27712812921102037
SetBusXY p5rdt22lv -120.97495604893834 36.588975013233814
SetkVBase p5rdt22lv kVLN=0.27712812921102037
SetBusXY p5rlv40 -120.9749855407454 36.58898169475094
SetkVBase p5rlv40 kVLN=0.27712812921102037
SetBusXY p5rdt149 -120.96160511254412 36.56887241444432
SetkVBase p5rdt149 kVLN=7.199557856794634
SetBusXY p5rdt149-p5rdt22x -120.97076724677004 36.584033672730996
SetkVBase p5rdt149-p5rdt22x kVLN=7.199557856794634
SetBusXY p5rdt22 -120.97494941278845 36.588933180522076
SetkVBase p5rdt22 kVLN=7.199557856794634
SetBusXY p5rdt149-p5rhs0_1247x_b2_1 -120.92580511661268 36.593633797608774
SetkVBase p5rdt149-p5rhs0_1247x_b2_1 kVLN=7.199557856794634
SetBusXY p5rdt149-p5rhs0_1247x -120.91292875147646 36.60102672210813
SetkVBase p5rdt149-p5rhs0_1247x kVLN=7.199557856794634
SetBusXY p5rdt149-p5rhs0_1247x_b1_1 -120.91984825250762 36.59776619575616
SetkVBase p5rdt149-p5rhs0_1247x_b1_1 kVLN=7.199557856794634
SetBusXY p5rdt149lv -120.96155778160369 36.56885399412164
SetkVBase p5rdt149lv kVLN=0.27712812921102037
SetBusXY p5rlv265 -120.96150686468123 36.56884369179864
SetkVBase p5rlv265 kVLN=0.27712812921102037
SetBusXY p5rdt22lv -120.97495604893834 36.588975013233814
SetkVBase p5rdt22lv kVLN=0.27712812921102037
SetBusXY p5rlv40 -120.9749855407454 36.58898169475094
SetkVBase p5rlv40 kVLN=0.27712812921102037
SetBusXY p5rdt149 -120.96160511254412 36.56887241444432
SetkVBase p5rdt149 kVLN=7.199557856794634
SetBusXY p5rdt149-p5rdt22x -120.97076724677004 36.584033672730996
SetkVBase p5rdt149-p5rdt22x kVLN=7.199557856794634
SetBusXY p5rdt22 -120.97494941278845 36.588933180522076
SetkVBase p5rdt22 kVLN=7.199557856794634
SetBusXY p5rdt149-p5rhs0_1247x_b2_1 -120.92580511661268 36.593633797608774
SetkVBase p5rdt149-p5rhs0_1247x_b2_1 kVLN=7.199557856794634
SetBusXY p5rdt149-p5rhs0_1247x -120.91292875147646 36.60102672210813
SetkVBase p5rdt149-p5rhs0_1247x kVLN=7.199557856794634
SetBusXY p5rdt149-p5rhs0_1247x_b1_1 -120.91984825250762 36.59776619575616
SetkVBase p5rdt149-p5rhs0_1247x_b1_1 kVLN=7.199557856794634
SetBusXY p5rdt149lv -120.96155778160369 36.56885399412164
SetkVBase p5rdt149lv kVLN=0.27712812921102037
SetBusXY p5rlv265 -120.96150686468123 36.56884369179864
SetkVBase p5rlv265 kVLN=0.27712812921102037
SetBusXY p5rdt22lv -120.97495604893834 36.588975013233814
SetkVBase p5rdt22lv kVLN=0.27712812921102037
SetBusXY p5rlv40 -120.9749855407454 36.58898169475094
SetkVBase p5rlv40 kVLN=0.27712812921102037
SetBusXY p5rdt149 -120.96160511254412 36.56887241444432
SetkVBase p5rdt149 kVLN=7.199557856794634
SetBusXY p5rdt149-p5rdt22x -120.97076724677004 36.584033672730996
SetkVBase p5rdt149-p5rdt22x kVLN=7.199557856794634
SetBusXY p5rdt22 -120.97494941278845 36.588933180522076
SetkVBase p5rdt22 kVLN=7.199557856794634
SetBusXY p5rdt149-p5rhs0_1247x_b2_1 -120.92580511661268 36.593633797608774
SetkVBase p5rdt149-p5rhs0_1247x_b2_1 kVLN=7.199557856794634
