new LineCode.3bc11bb4-39a8-45ff-aab0-62f1d974ee0b NPhases=3 Units=km RMatrix=(1000.0 0.0 0.0 |0.0 1000.0 0.0 |0.0 0.0 1000.0 ) XMatrix=(1000.0 0.0 0.0 |0.0 1000.0 0.0 |0.0 0.0 1000.0 ) CMatrix=(1066.666666666667 -33.333333333333364 -33.333333333333364 |-33.333333333333364 1066.666666666667 -33.333333333333364 |-33.333333333333364 -33.333333333333364 1066.666666666667 ) NormAmps=325.0
new LineCode.3bc11bb4-39a8-45ff-aab0-62f1d974ee0b NPhases=3 Units=km RMatrix=(1000.0 0.0 0.0 |0.0 1000.0 0.0 |0.0 0.0 1000.0 ) XMatrix=(1000.0 0.0 0.0 |0.0 1000.0 0.0 |0.0 0.0 1000.0 ) CMatrix=(1066.666666666667 -33.333333333333364 -33.333333333333364 |-33.333333333333364 1066.666666666667 -33.333333333333364 |-33.333333333333364 -33.333333333333364 1066.666666666667 ) NormAmps=325.0
new LineCode.3bc11bb4-39a8-45ff-aab0-62f1d974ee0b NPhases=3 Units=km RMatrix=(1000.0 0.0 0.0 |0.0 1000.0 0.0 |0.0 0.0 1000.0 ) XMatrix=(1000.0 0.0 0.0 |0.0 1000.0 0.0 |0.0 0.0 1000.0 ) CMatrix=(1066.666666666667 -33.333333333333364 -33.333333333333364 |-33.333333333333364 1066.666666666667 -33.333333333333364 |-33.333333333333364 -33.333333333333364 1066.666666666667 ) NormAmps=325.0
